<?xml version="1.0"?>
<!--
  File:     M-62.xml
  Author:   Aero-Matic v 0.82

  Inputs:
    name:           M-62
    type:           piston
    power:          1000 hp
    augmented?      no
    injected?       no
-->

<piston_engine name="M-62">
  <minmp unit="INHG">         10.500 </minmp>
  <maxmp unit="INHG">         29.592 </maxmp>
  <displacement unit="IN3"> 1900.000 </displacement>
  <maxhp>       1000.0 </maxhp>
  <cycles>         4.0 </cycles>
  <idlerpm>      600.0 </idlerpm>
  <maxrpm>      2600.0 </maxrpm>
  <maxthrottle>    1.0 </maxthrottle><!-- Deprecated -->
  <minthrottle>    0.1 </minthrottle><!-- Deprecated -->
  <sparkfaildrop>  0.1 </sparkfaildrop>
  <volumetric-efficiency> 0.85 </volumetric-efficiency>
  <bsfc>           0.35</bsfc>  <!--0.233-->
  <stroke unit="M">  0.152  </stroke>
  <bore unit="M">    0.175 </bore>
  <cylinders>        9.0  </cylinders>
  <compression-ratio>5.1 </compression-ratio>
  <cylinder-head-mass unit="KG"> 50 </cylinder-head-mass>
  <numboostspeeds> 1 </numboostspeeds>
  <boostoverride>  0 </boostoverride>
  <ratedboost1 unit="INHG"> 5.9 </ratedboost1> <!-- +150mmHg = 1.2 bar -->
  <ratedpower1> 800 </ratedpower1>
  <ratedrpm1>  1900 </ratedrpm1>
  <ratedaltitude1> 13100 </ratedaltitude1>
  <takeoffboost  unit="INHG">9.85</takeoffboost> <!-- +250mmHg = 1.333 bar -->
</piston_engine>
