<?xml version="1.0"?>
<?xml-stylesheet type="text/xsl" href="http://jsbsim.sourceforge.net/JSBSim.xsl"?>
<fdm_config name="I16" version="2.0" release="ALPHA"
   xmlns:xsi="http://www.w3.org/2001/XMLSchema-instance"
   xsi:noNamespaceSchemaLocation="http://jsbsim.sourceforge.net/JSBSim.xsd">

	<fileheader>
		<author>Lake of Constance Hangar :: M.Kraus</author>
		<filecreationdate>12 December 2012</filecreationdate>
		<version>1.1.0</version>
		<description> Polikarpov I-16 </description>
	</fileheader>

  <metrics>
    <wingarea  unit="M2">       27.69 </wingarea>
    <wingspan  unit="M" >        9.12 </wingspan>
    <chord    unit="M" >         3.07 </chord>
    <htailarea unit="M2">        4.42 </htailarea>
    <htailarm  unit="M" >        3.18 </htailarm>
    <vtailarea unit="M2">        2.77 </vtailarea>
    <vtailarm  unit="M" >        3.02 </vtailarm>

    <location name="AERORP" unit="M">
      <x> -1.43 </x>
      <y>  0.00 </y>
      <z>  0.00 </z>
    </location>
    <location name="EYEPOINT" unit="M">
      <x>  -1.11 </x>
      <y>   0.00 </y>
      <z>   0.55 </z>
    </location>
    <location name="VRP" unit="M">
      <x> 0 </x>
      <y> 0 </y>
      <z> 0 </z>
    </location>
  </metrics>

   <mass_balance>
    <ixx unit="KG*M2">    3808.45 </ixx>
    <iyy unit="KG*M2">    3854.55 </iyy>
    <izz unit="KG*M2">    5833.91 </izz>
   <emptywt unit="KG" >      1430 </emptywt>
   <location name="CG" unit="M">
     <x>  -1.40</x>
     <y>   0.00 </y>
     <z>  -0.18 </z>
   </location>

   <pointmass name="Pilot">
     <weight unit="KG"> 0 </weight>
     <location name="POINTMASS" unit="M">
       <x>0.74 </x>
       <y>  0 </y>
       <z>0.35</z>
     </location>
   </pointmass>

   <pointmass name="Oil">
     <weight unit="KG"> 0 </weight>
     <location name="POINTMASS" unit="M">
       <x>-0.58 </x>
       <y>   0 </y>
       <z> 0.35</z>
     </location>
   </pointmass>

 </mass_balance>

  <ground_reactions>

    <contact type="BOGEY" name="LEFT_MAIN">
      <location unit="M">
        <x> -1.65 </x>
        <y> -3.24 </y>
        <z> -1.69 </z>
      </location>
      <static_friction>  0.80 </static_friction>
      <dynamic_friction> 0.50 </dynamic_friction>
      <rolling_friction> 0.02 </rolling_friction>
      <spring_coeff unit="N/M">      65000 </spring_coeff>
      <damping_coeff unit="N/M/SEC"> 13000 </damping_coeff>
      <max_steer unit="DEG">20</max_steer>
      <brake_group>LEFT</brake_group>
      <retractable>1</retractable>
    </contact>

    <contact type="BOGEY" name="RIGHT_MAIN">
      <location unit="M">
        <x> -1.65 </x>
        <y>  3.24 </y>
        <z> -1.69 </z>
      </location>
      <static_friction>  0.80 </static_friction>
      <dynamic_friction> 0.50 </dynamic_friction>
      <rolling_friction> 0.02 </rolling_friction>
      <spring_coeff unit="N/M">      65000 </spring_coeff>
      <damping_coeff unit="N/M/SEC"> 13000 </damping_coeff>
		  <max_steer unit="DEG">20</max_steer>
		  <brake_group>RIGHT</brake_group>
		  <retractable>1</retractable>
    </contact>

		<contact type="BOGEY" name="TAIL">
			<location unit="M">
				<x>  4.30 </x>
				<y>  0.00 </y>
				<z>  0.00 </z>
			</location>
			<static_friction>  0.80 </static_friction>
			<dynamic_friction> 0.50 </dynamic_friction>
			<rolling_friction> 0.02 </rolling_friction>
      <spring_coeff unit="N/M">      65000 </spring_coeff>
      <damping_coeff unit="N/M/SEC"> 13000 </damping_coeff>
			<max_steer unit="DEG"> -10.00 </max_steer>
			<brake_group>NONE</brake_group>
			<retractable>0</retractable>
		</contact>

    <contact type="STRUCTURE" name="LEFT_WING">
      <location unit="M">
        <x> -1.20 </x>
        <y> -4.35 </y>
        <z> -0.40 </z>
      </location>
      <static_friction>  0.2 </static_friction>
      <dynamic_friction> 0.2 </dynamic_friction>
      <spring_coeff unit="N/M">       65000 </spring_coeff>
      <damping_coeff unit="N/M/SEC">  13000 </damping_coeff>
    </contact>

    <contact type="STRUCTURE" name="RIGHT_WING">
      <location unit="M">
        <x> -1.20 </x>
        <y>  4.35 </y>
        <z> -0.40 </z>
      </location>
      <static_friction>  0.2 </static_friction>
      <dynamic_friction> 0.2 </dynamic_friction>
      <spring_coeff unit="N/M">       65000 </spring_coeff>
      <damping_coeff unit="N/M/SEC">  13000 </damping_coeff>
    </contact>

  </ground_reactions>

  <propulsion>

      <engine file="M-62">
      <location unit="M">
        <x> -4.60 </x>
        <y>  0.00 </y>
        <z>  0.00 </z>
      </location>
      <orient unit="DEG">
        <pitch> 0.00 </pitch>
        <roll>  0.00 </roll>
        <yaw>   0.00 </yaw>
      </orient>
      <feed>0</feed>
      <thruster file="M-62-prop2">
        <location unit="IN">
          <x> -4.60 </x>
          <y>  0.00 </y>
          <z>  0.00 </z>
        </location>
        <orient unit="DEG">
          <pitch> 0.00 </pitch>
          <roll>  0.00 </roll>
          <yaw>  0.00 </yaw>
        </orient>
      </thruster>
    </engine>

		<tank type="FUEL" number="0">
		   <location unit="IN">
		     <x>  -0.2 </x>
		     <y>   0.0 </y>
		     <z>  15.54 </z>
		   </location>
		   <capacity unit="LBS"> 1200.0 </capacity>
		   <contents unit="LBS"> 0 </contents>
		</tank>

  </propulsion>

  <flight_control name="FCS: I16">

    <channel name="Pitch">
      <summer name="Pitch Trim Sum">
        <input>fcs/elevator-cmd-norm</input>
        <input>fcs/pitch-trim-cmd-norm</input>
        <clipto>
          <min> -1 </min>
          <max>  1 </max>
        </clipto>
      </summer>

      <aerosurface_scale name="Elevator Control">
        <input>fcs/pitch-trim-sum</input>
        <range>
          <min> -0.25 </min>
          <max>  0.20 </max>
        </range>
        <output>fcs/elevator-pos-rad</output>
      </aerosurface_scale>

    </channel>

    <channel name="Roll">
      <summer name="Roll Trim Sum">
        <input>fcs/aileron-cmd-norm</input>
        <input>fcs/roll-trim-cmd-norm</input>
        <clipto>
          <min> -1 </min>
          <max>  1 </max>
        </clipto>
      </summer>

      <aerosurface_scale name="Left Aileron Control">
        <input>fcs/roll-trim-sum</input>
        <range>
          <min> -0.25 </min>
          <max>  0.25 </max>
        </range>
        <output>fcs/left-aileron-pos-rad</output>
      </aerosurface_scale>

      <aerosurface_scale name="Right Aileron Control">
        <input>fcs/roll-trim-sum</input>
        <range>
          <min> -0.25 </min>
          <max>  0.25 </max>
        </range>
        <output>fcs/right-aileron-pos-rad</output>
      </aerosurface_scale>

    </channel>

    <channel name="Yaw">
      <summer name="Rudder Command Sum">
        <input>fcs/rudder-cmd-norm</input>
        <input>fcs/yaw-trim-cmd-norm</input>
        <limit>
          <min> -0.25 </min>
          <max>  0.25 </max>
        </limit>
        <output>surface-positions/rudder-pos-norm</output>
      </summer>

      <aerosurface_scale name="Rudder Control">
        <input>fcs/rudder-command-sum</input>
        <range>
          <min> -0.25 </min>
          <max>  0.25 </max>
        </range>
        <output>fcs/rudder-pos-rad</output>
      </aerosurface_scale>

    </channel>

		<channel name="Flaps">
		 <kinematic name="Flaps Control">
		   <input>fcs/flap-cmd-norm</input>
		   <traverse>
		     <setting>
		        <position>  0 </position>
		        <time>      0 </time>
		     </setting>
		     <setting>
		        <position> 10 </position>
		        <time>      4 </time>
		     </setting>
		   </traverse>
		   <output>fcs/flap-pos-deg</output>
		 </kinematic>

		 <aerosurface_scale name="flap normalization">
		    <input>fcs/flap-pos-deg</input>
		    <domain>
		      <min>  0 </min>
		      <max> 10 </max>
		    </domain>
		    <range>
		      <min> 0 </min>
		      <max> 1 </max>
		    </range>
		    <output>fcs/flap-pos-norm</output>
		 </aerosurface_scale>

		</channel>

		<channel name="Landing Gear">
		 <kinematic name="Gear Control">
		   <input>gear/gear-cmd-norm</input>
		   <traverse>
		     <setting>
		        <position> 0 </position>
		        <time>     0 </time>
		     </setting>
		     <setting>
		        <position> 1 </position>
		        <time>     5.8 </time>
		     </setting>
		   </traverse>
		   <output>gear/gear-pos-norm</output>
		 </kinematic>

		</channel>

		<channel name="Speedbrake">
		 <kinematic name="Speedbrake Control">
		   <input>fcs/speedbrake-cmd-norm</input>
		   <traverse>
		     <setting>
		        <position> 0 </position>
		        <time>     0 </time>
		     </setting>
		     <setting>
		        <position> 1 </position>
		        <time>     1 </time>
		     </setting>
		   </traverse>
		   <output>fcs/speedbrake-pos-norm</output>
		 </kinematic>

		</channel>

  </flight_control>

 <aerodynamics>

  <axis name="LIFT">

    <function name="aero/force/Lift_alpha">
      <description>Lift due to alpha</description>
      <product>
          <property>aero/qbar-psf</property>
          <property>metrics/Sw-sqft</property>
          <table>
            <independentVar lookup="row">aero/alpha-rad</independentVar>
            <tableData>
              -0.20 -0.750
               0.00  0.250
               0.23  1.400
               0.60  0.710
            </tableData>
          </table>
      </product>
    </function>

    <function name="aero/force/Lift_flap">
       <description>Delta Lift due to flaps</description>
       <product>
           <property>aero/qbar-psf</property>
           <property>metrics/Sw-sqft</property>
           <property>fcs/flap-pos-deg</property>
           <value> 0.01333 </value>
       </product>
    </function>

    <function name="aero/force/Lift_speedbrake">
       <description>Delta Lift due to speedbrake</description>
       <product>
           <property>aero/qbar-psf</property>
           <property>metrics/Sw-sqft</property>
           <property>fcs/speedbrake-pos-norm</property>
           <value>0</value>
       </product>
    </function>

    <function name="aero/force/Lift_elevator">
       <description>Lift due to Elevator Deflection</description>
       <product>
           <property>aero/qbar-psf</property>
           <property>metrics/Sw-sqft</property>
           <property>fcs/elevator-pos-rad</property>
           <value>0.2</value>
       </product>
    </function>

  </axis>

  <axis name="DRAG">

    <function name="aero/force/Drag_basic">
       <description>Drag at zero lift</description>
       <product>
          <property>aero/qbar-psf</property>
          <property>metrics/Sw-sqft</property>
          <table>
            <independentVar lookup="row">aero/alpha-rad</independentVar>
            <tableData>
             -1.57    1.500
             -0.26    0.031
              0.00    0.024
              0.26    0.031
              1.57    1.500
            </tableData>
          </table>
       </product>
    </function>

    <function name="aero/force/Drag_induced">
       <description>Induced drag</description>
         <product>
           <property>aero/qbar-psf</property>
           <property>metrics/Sw-sqft</property>
           <property>aero/cl-squared</property>
           <value>0.04</value>
         </product>
    </function>

    <function name="aero/force/Drag_mach">
       <description>Drag due to mach</description>
        <product>
          <property>aero/qbar-psf</property>
          <property>metrics/Sw-sqft</property>
          <table>
            <independentVar lookup="row">velocities/mach</independentVar>
            <tableData>
                0.00      0.000
                0.7      0.000
                1.10      0.023
                1.80      0.015
            </tableData>
          </table>
        </product>
    </function>

    <function name="aero/force/Drag_flap">
       <description>Drag due to flaps</description>
         <product>
           <property>aero/qbar-psf</property>
           <property>metrics/Sw-sqft</property>
           <property>fcs/flap-pos-deg</property>
           <value> 0.00100 </value>
         </product>
    </function>

    <function name="aero/force/Drag_gear">
       <description>Drag due to gear</description>
         <product>
           <property>aero/qbar-psf</property>
           <property>metrics/Sw-sqft</property>
           <property>gear/gear-pos-norm</property>
           <value>0.03</value>
         </product>
    </function>

    <function name="aero/force/Drag_speedbrake">
       <description>Drag due to speedbrakes</description>
         <product>
           <property>aero/qbar-psf</property>
           <property>metrics/Sw-sqft</property>
           <property>fcs/speedbrake-pos-norm</property>
           <value>0.024</value>
         </product>
    </function>

    <function name="aero/force/Drag_beta">
       <description>Drag due to sideslip</description>
       <product>
          <property>aero/qbar-psf</property>
          <property>metrics/Sw-sqft</property>
          <table>
            <independentVar lookup="row">aero/beta-rad</independentVar>
            <tableData>
              -1.57    1.230
              -0.26    0.050
               0.00    0.000
               0.26    0.050
               1.57    1.230
            </tableData>
          </table>
       </product>
    </function>

    <function name="aero/force/Drag_elevator">
       <description>Drag due to Elevator Deflection</description>
       <product>
           <property>aero/qbar-psf</property>
           <property>metrics/Sw-sqft</property>
           <abs><property>fcs/elevator-pos-norm</property></abs>
           <value>0.04</value>
       </product>
    </function>

  </axis>

  <axis name="SIDE">

    <function name="aero/force/Side_beta">
       <description>Side force due to beta</description>
       <product>
           <property>aero/qbar-psf</property>
           <property>metrics/Sw-sqft</property>
           <property>aero/beta-rad</property>
           <value>-1</value>
       </product>
    </function>

  </axis>

  <axis name="ROLL">

    <function name="aero/moment/Roll_beta">
       <description>Roll moment due to beta</description>
       <product>
           <property>aero/qbar-psf</property>
           <property>metrics/Sw-sqft</property>
           <property>metrics/bw-ft</property>
           <property>aero/beta-rad</property>
           <value>-0.1</value>
       </product>
    </function>

    <function name="aero/moment/Roll_damp">
       <description>Roll moment due to roll rate</description>
       <product>
           <property>aero/qbar-psf</property>
           <property>metrics/Sw-sqft</property>
           <property>metrics/bw-ft</property>
           <property>aero/bi2vel</property>
           <property>velocities/p-aero-rad_sec</property>
           <value>-0.4</value>
       </product>
    </function>

    <function name="aero/moment/Roll_yaw">
       <description>Roll moment due to yaw rate</description>
       <product>
           <property>aero/qbar-psf</property>
           <property>metrics/Sw-sqft</property>
           <property>metrics/bw-ft</property>
           <property>aero/bi2vel</property>
           <property>velocities/r-aero-rad_sec</property>
           <value>0.15</value>
       </product>
    </function>

    <function name="aero/moment/Roll_aileron">
       <description>Roll moment due to aileron</description>
       <product>
          <property>aero/qbar-psf</property>
          <property>metrics/Sw-sqft</property>
          <property>metrics/bw-ft</property>
          <property>fcs/left-aileron-pos-rad</property>
          <value>0.17</value>
       </product>
    </function>

    <function name="aero/moment/Roll_rudder">
       <description>Roll moment due to rudder</description>
       <product>
           <property>aero/qbar-psf</property>
           <property>metrics/Sw-sqft</property>
           <property>metrics/bw-ft</property>
           <property>fcs/rudder-pos-rad</property>
           <value>0.01</value>
       </product>
    </function>

  </axis>

  <axis name="PITCH">

    <function name="aero/moment/Pitch_alpha">
       <description>Pitch moment due to alpha</description>
       <product>
           <property>aero/qbar-psf</property>
           <property>metrics/Sw-sqft</property>
           <property>metrics/cbarw-ft</property>
           <property>aero/alpha-rad</property>
           <value>-0.5</value>
       </product>
    </function>

    <function name="aero/moment/Pitch_elevator">
       <description>Pitch moment due to elevator</description>
       <product>
          <property>aero/qbar-psf</property>
          <property>metrics/Sw-sqft</property>
          <property>metrics/cbarw-ft</property>
          <property>fcs/elevator-pos-rad</property>
          <table>
            <independentVar lookup="row">velocities/mach</independentVar>
            <tableData>
              0.0     -1.100
              2.0     -0.275
            </tableData>
          </table>
       </product>
    </function>

    <function name="aero/moment/Pitch_damp">
       <description>Pitch moment due to pitch rate</description>
       <product>
           <property>aero/qbar-psf</property>
           <property>metrics/Sw-sqft</property>
           <property>metrics/cbarw-ft</property>
           <property>aero/ci2vel</property>
           <property>velocities/q-aero-rad_sec</property>
           <value>-12</value>
       </product>
    </function>

    <function name="aero/moment/Pitch_alphadot">
       <description>Pitch moment due to alpha rate</description>
       <product>
           <property>aero/qbar-psf</property>
           <property>metrics/Sw-sqft</property>
           <property>metrics/cbarw-ft</property>
           <property>aero/ci2vel</property>
           <property>aero/alphadot-rad_sec</property>
           <value>-7</value>
       </product>
    </function>

  </axis>

  <axis name="YAW">

    <function name="aero/moment/Yaw_beta">
       <description>Yaw moment due to beta</description>
       <product>
           <property>aero/qbar-psf</property>
           <property>metrics/Sw-sqft</property>
           <property>metrics/bw-ft</property>
           <property>aero/beta-rad</property>
           <value>0.12</value>
       </product>
    </function>

    <function name="aero/moment/Yaw_damp">
       <description>Yaw moment due to yaw rate</description>
       <product>
           <property>aero/qbar-psf</property>
           <property>metrics/Sw-sqft</property>
           <property>metrics/bw-ft</property>
           <property>aero/bi2vel</property>
           <property>velocities/r-aero-rad_sec</property>
           <value>-0.15</value>
       </product>
    </function>

    <function name="aero/moment/Yaw_rudder">
       <description>Yaw moment due to rudder</description>
       <product>
           <property>aero/qbar-psf</property>
           <property>metrics/Sw-sqft</property>
           <property>metrics/bw-ft</property>
           <property>fcs/rudder-pos-rad</property>
           <value>-0.1</value>
       </product>
    </function>

    <function name="aero/moment/Yaw_aileron">
       <description>Adverse yaw</description>
       <product>
           <property>aero/qbar-psf</property>
           <property>metrics/Sw-sqft</property>
           <property>metrics/bw-ft</property>
           <property>fcs/left-aileron-pos-rad</property>
           <value>-0.01</value>
       </product>
    </function>

  </axis>

 </aerodynamics>

  <system file="crash-detect"/>

</fdm_config>
